// COMSOL Multiphysics 6.2.0.290 model "Numerators_sphereDipole_template.mph"
// Outline of the model tree

Parameters
  p = 100[nm]
  L = 550[nm]
  f0 = c_const/L
  RR = 10000[nm]
  ng = 1.5
  rr = 50[nm]

Coordinate systems
  pml1: PML "Perfectly Matched Layer 1" on domains 1, 5 | ScalingType = Spherical

Geometry
  geom1 "Geometry 1" (2D axisymmetric, length unit m)
    c1: Circle | layername = Layer 2; layer = 1000[nm]; r = RR
    ls1: LineSegment | vertex1 = c1(1) points 1; vertex2 = c1(1) points 8
    c2: Circle | pos = {0, -p}; r = rr
    dif1: Difference | input = c1; input2 = c2; keepsubtract = on
    par1: Partition "Partition Objects 1" | input = dif1; tool = ls1
    fin: Finalize "Form Union"

Materials
  mat1: Common "Air" on domains 4, 5
    def "Basic"
      thermalexpansioncoefficient = alpha_p(pA,T)
      molarmass = 0.02897[kg/mol]
      bulkviscosity = muB(T)
      relpermeability = 1
      relpermittivity = 1
      dynamicviscosity = eta(T)
      ratioofspecificheat = 1.4
      electricconductivity = 0[S/m]
      heatcapacity = Cp(T)
      density = rho(pA,T)
      thermalconductivity = k(T)
      soundspeed = cs(T)
      eta: Piecewise | arg = T; pieces = {200.0, 1600.0, -8.38278E-7+8.35717342E-8*T^1-7.69429583E-11*T^2+4.6437266E-14*T^3-1.06585607E-17*T^4}; argunit = K; fununit = Pa*s
      Cp: Piecewise | arg = T; pieces = {200.0, 1600.0, 1047.63657-0.372589265*T^1+9.45304214E-4*T^2-6.02409443E-7*T^3+1.2858961E-10*T^4}; argunit = K; fununit = J/(kg*K)
      rho: Analytic | expr = pA*0.02897/R_const[K*mol/J]/T; args = {pA, T}; fununit = kg/m^3; argunit = {Pa, K}
      k: Piecewise | arg = T; pieces = {200.0, 1600.0, -0.00227583562+1.15480022E-4*T^1-7.90252856E-8*T^2+4.11702505E-11*T^3-7.43864331E-15*T^4}; argunit = K; fununit = W/(m*K)
      cs: Analytic | expr = sqrt(1.4*R_const[K*mol/J]/0.02897*T); args = T; fununit = m/s; argunit = K
      an1: Analytic | funcname = alpha_p; expr = -1/rho(pA,T)*d(rho(pA,T),T); args = {pA, T}; fununit = 1/K; argunit = {Pa, K}
      an2: Analytic "Analytic 2a" | funcname = muB; expr = 0.6*eta(T); args = T; fununit = Pa*s; argunit = K
    RefractiveIndex
      n = 1
      ki = 0
    NonlinearModel
      BA = def.gamma-1
    idealGas
      Rs = R_const/Mn
      heatcapacity = Cp(T)
      ratioofspecificheat = 1.4
      molarmass = 0.02897
      Cp: Piecewise | arg = T; pieces = {200.0, 1600.0, 1047.63657-0.372589265*T^1+9.45304214E-4*T^2-6.02409443E-7*T^3+1.2858961E-10*T^4}; argunit = K; fununit = J/(kg*K)
  mat2: Common "Aluminum" on domains 3
    def "Basic"
      relpermeability = 1
      heatcapacity = 900[J/(kg*K)]
      thermalconductivity = 238[W/(m*K)]
      electricconductivity = 3.774e7[S/m]
      relpermittivity = 1
      thermalexpansioncoefficient = 23e-6[1/K]
      density = 2700[kg/m^3]
    Enu "Young's modulus and Poisson's ratio"
      E = 70[GPa]
      nu = 0.33
    Murnaghan
      l = -250[GPa]
      m = -330[GPa]
      n = -350[GPa]
  mat3: Common "Silica glass" on domains 1, 2
    def "Basic"
      relpermeability = 1
      electricconductivity = 0
      thermalexpansioncoefficient = 0.55e-6[1/K]
      heatcapacity = 703[J/(kg*K)]
      relpermittivity = 2.25
      density = 2203[kg/m^3]
      thermalconductivity = 1.38[W/(m*K)]
    Enu "Young's modulus and Poisson's ratio"
      E = 73.1[GPa]
      nu = 0.17
    RefractiveIndex
      n = ng
      ki = 0
  mat4: Common "Copper" on boundaries 9, 14
    def "Basic"
      relpermeability = 1
      electricconductivity = 5.998e7[S/m]
      thermalexpansioncoefficient = 17e-6[1/K]
      heatcapacity = 385[J/(kg*K)]
      relpermittivity = 1
      density = 8960[kg/m^3]
      thermalconductivity = 400[W/(m*K)]
    Enu "Young's modulus and Poisson's ratio"
      E = 110[GPa]
      nu = 0.35
    linzRes "Linearized resistivity"
      rho0 = 1.72e-8[ohm*m]
      alpha = 0.0039[1/K]
      Tref = 298[K]

Physics
  emw: ElectromagneticWaves "Electromagnetic Waves, Frequency Domain" on domains 1, 2, 4, 5
    dependent variable E = {Er, Ephi, Ez}
    MeshControl.SizeControlParameter = Wavelength
    MeshControl.PhysicsControlledMeshMinimumWavelength = L
    MeshControl.AddFarFieldBoundaryLayers = 1
    wee1: WaveEquationElectric (default) | DisplacementFieldModel = RefractiveIndex; minput_frequency = f0
    axi1: AxialSymmetry (default)
    pec1: PerfectElectricConductor (default)
    init1: init "Initial Values 1" (default)
    lport1: LumpedPort (disabled) on no boundaries
      SourceType = Power
      PortType = UserDefined
      TerminalType = Cable
      hPort = rr
      wPort = pi*rr
      ahPort = {0, 0, 1}
    ffd1: FarFieldDomain on domains 2
      ffc1: FarFieldCalculation on boundaries 10, 13
    sctr1: Scattering "Scattering Boundary Condition 1" on boundaries 9, 14
    ffd2: FarFieldDomain on domains 4
      ffc1: FarFieldCalculation on boundaries 10, 13
    scu1: SurfaceCurrent "Surface Current Density 1" on boundaries 11, 12 | Js0 = {0, 0, 1}

Mesh
  mesh1 "Mesh 1" (physics-controlled)

Studies
  std1 "Study 1"
    param: Parametric "Parametric Sweep" | sweeptype = filled; pname = p; plistarr = range(100,50,1000); punit = nm
    freq: Frequency "Frequency Domain" | punit = GHz; plist = f0

Solver configurations
  sol1 "Solution 1" (study std1)
    v1: Variables "Dependent Variables 1"
    s1: Stationary "Stationary Solver 1" | stol = 0.01; linpmethod = sol
      fc1: FullyCoupled | linsolver = d1
      d1: Direct "Suggested Direct Solver (emw)" | linsolver = pardiso
  sol2 "Parametric Solutions 1" (study std1)

Datasets
  dset1: Solution | solution = sol1
  rev1: Revolve2D "Revolution 2D" | data = dset1; startangle = -90; revangle = 225
  dset2: Solution | solution = sol2
  rev2: Revolve2D "Revolution 2D 1" | data = dset2; startangle = -90; revangle = 225

Derived values
  gev1: EvalGlobal "S-parameter (emw)" | data = dset1; table = tbl1; expr = emw.S11dB

Tables
  tbl1: Table
    freq (GHz) | S11 (1)
    563520 | 5.46516
  rp1: Table "Directivity"
    // Radiation pattern
    θ (deg) | φ (deg) | Directivity | Directivity (dB)
    141.788 | 0 | 23.0122 | 13.6196

Plots
  pg1: PlotGroup2D "Electric Field (emw)" | data = dset2; dataisaxisym = on
    surf1: Surface | data = dset2; expr = (emw.Poavr^2+emw.Poavphi^2+emw.Poavz^2)^0.5
  pg2: PolarGroup "Polar Plot Group 2" | data = dset2
    lngr1: LineGraph on boundaries 10, 13
      expr = (emw.Poavr^2+emw.Poavphi^2+emw.Poavz^2)^0.5
      xdata = expr
      xdataexpr = atan2(z,r)
  pg3: PolarGroup "Polar Plot Group 3" | data = dset2
    lngr1: LineGraph | expr = emw.normEfar; descr = Far-field norm; xdata = expr; xdataexpr = atan2(z,r)
    lngr2: LineGraph on boundaries 9, 14
      expr = emw.normEfar
      descr = Far-field norm
      xdata = expr
      xdataexpr = pi-atan2(z,r)
  pg4: PlotGroup2D "PoyntingVector" | data = dset2; dataisaxisym = on
    surf1: Surface | data = dset2; expr = emw.normE
  pg5: PlotGroup1D "S-parameter (emw)" | data = dset2; ylabel = S-parameter (dB)
    glob1: Global | expr = emw.S11dB; descr = S11; xdata = expr; xdataexpr = p
  pg6: SmithGroup "Smith Plot (emw)" | data = dset2
    rgr1: ReflectionGraph | expr = emw.S11; descr = S11; title = Reflection Graph: S-parameter, Color: Frequency (GHz)
      col1: Color "Color Expression 1" | expr = emw.freq/1e9
  pg7: PolarGroup "2D Far Field (emw)" | data = dset2
    rp1: RadiationPattern | data = dset2; expr = (emw.normEfar^2); phidisc = 1000
      exp1: Export "Export Expressions 1" | expr = comp1.emw.theta
  pg8: PlotGroup3D "3D Far Field, Gain (emw)" | data = none
    rp1: RadiationPattern
      data = dset2
      expr = emw.rGaindBEfar
      thetadisc = 180
      phidisc = 45
      directivity = on
      directivityexpr = emw.normEfar^2
      table = rp1
      exp1: Export "Export Expressions 1" | expr = comp1.emw.theta
  pg10: PlotGroup3D "3D Far Field, Gain (emw) 1" | data = none
    rp1: RadiationPattern
      data = dset2
      expr = emw.rGaindBEfar
      thetadisc = 180
      phidisc = 45
      directivity = on
      directivityexpr = emw.normEfar2^2
      exp1: Export "Export Expressions 1" | expr = comp1.emw.theta
  pg11: PlotGroup2D "Er" | data = dset2; dataisaxisym = on
    surf1: Surface | data = dset2; expr = emw.Er
  pg12: PlotGroup2D "Ez" | data = dset2; dataisaxisym = on
    surf1: Surface | data = dset2; expr = emw.Ez

Exports
  plot1: Plot | filename = C:\Users\jonesb\Documents\Export_Power_Below_50_longer_sphere.txt; multiplecurves = ascolumns
  img1: Image "PolarPlot"
    size = manualweb
    unit = px
    width = 640
    height = 480
    pngfilename = C:\Users\jonesb\Documents\PolarPlus10000.png
  anim1: Animation | giffilename = C:\Users\jonesb\Documents\Power3D_Axial.gif; globalparameter = p; framesel = all
  anim2: Animation | giffilename = C:\Users\jonesb\Documents\PolarPlot_Axial.gif; framesel = all
  plot2: Plot
  img2: Image "Poynting"
    size = current
    unit = px
    width = 800
    height = 600
    pngfilename = C:\Users\jonesb\Documents\PoyntingVectoPlus.png
  img3: Image "Er"
    sourceobject = pg11
    size = current
    unit = px
    width = 800
    height = 600
    pngfilename = C:\Users\jonesb\Documents\ErMinus.png
  img4: Image "Ez"
    sourceobject = pg12
    size = current
    unit = px
    width = 800
    height = 600
    pngfilename = C:\Users\jonesb\Documents\EzMinus.png